// SBML level 3 version 2

model biocrnpyler_434365()
  // model units - substance: mole, time: second, volume: litre, area: square_metre, length: metre, extent: mole

  // Compartments:
  compartment default = 1e-6;

  // Species:
  species dna_part_P_SrpR_forward_part_P_BetI_forward_part_UTR1_forward_part_PhlF_forward_part_t16_forward_ in default = 0;
  species dna_part_P_Tac_forward_part_P_Tet_forward_part_UTR1_forward_part_SrpR_forward_part_t16_forward_ in default = 0;
  species dna_part_P_HlyIIR_forward_part_P_AmeR_forward_part_UTR1_forward_part_BetI_forward_part_t16_forward_ in default = 0;
  species dna_part_P_Tet_forward_part_UTR1_forward_part_AmeR_forward_part_t16_forward_ in default = 0;
  species dna_part_P_Tac_forward_part_UTR1_forward_part_HlyIIR_forward_part_t16_forward_ in default = 0;
  species dna_part_P_BAD_forward_part_UTR1_forward_part_AmtR_forward_part_t16_forward_ in default = 0;
  species dna_part_P_PhlF_forward_part_P_AmtR_forward_part_UTR1_forward_part_YFP_forward_part_t16_forward_ in default = 0;
  species protein_IPTG_input in default = 0;
  species protein_LacI_input in default = 0;
  species complex_protein_IPTG_input_2x_protein_LacI_input_2x_ in default = 0;
  species protein_aTc_input in default = 0;
  species protein_TetR_input in default = 0;
  species complex_protein_TetR_input_2x_protein_aTc_input_2x_ in default = 0;
  species protein_Ara_input in default = 0;
  species protein_AraC_input in default = 0;
  species complex_protein_AraC_input_2x_protein_Ara_input_2x_ in default = 0;
  species ordered_polymer_complex_part_P_SrpR_protein_SrpR_degtagged_forward__part_P_BetI_forward_part_UTR1_forward_part_PhlF_forward_part_t16_forward_ in default = 0;
  species rna_part_UTR1_forward_part_PhlF_forward_part_t16_forward_ in default = 0;
  species protein_BetI_degtagged in default = 0;
  species ordered_polymer_complex_part_P_SrpR_protein_SrpR_degtagged_forward__complex_part_P_BetI_protein_BetI_degtagged_2x_forward__part_UTR1_forward_part_PhlF_forward_part_t16_forward_ in default = 0;
  species ordered_polymer_part_P_SrpR_forward_complex_part_P_BetI_protein_BetI_degtagged_2x_forward__part_UTR1_forward_part_PhlF_forward_part_t16_forward_ in default = 0;
  species rna_part_P_BetI_forward_part_UTR1_forward_part_PhlF_forward_part_t16_forward_ in default = 0;
  species protein_SrpR_degtagged in default = 0;
  species ordered_polymer_complex_part_P_Tac_protein_LacI_input_4x_forward__part_P_Tet_forward_part_UTR1_forward_part_SrpR_forward_part_t16_forward_ in default = 0;
  species rna_part_UTR1_forward_part_SrpR_forward_part_t16_forward_ in default = 0;
  species ordered_polymer_complex_part_P_Tac_protein_LacI_input_4x_forward__complex_part_P_Tet_protein_TetR_input_4x_forward__part_UTR1_forward_part_SrpR_forward_part_t16_forward_ in default = 0;
  species ordered_polymer_part_P_Tac_forward_complex_part_P_Tet_protein_TetR_input_4x_forward__part_UTR1_forward_part_SrpR_forward_part_t16_forward_ in default = 0;
  species rna_part_P_Tet_forward_part_UTR1_forward_part_SrpR_forward_part_t16_forward_ in default = 0;
  species ordered_polymer_complex_part_P_HlyIIR_protein_HlyIIR_degtagged_2x_forward__part_P_AmeR_forward_part_UTR1_forward_part_BetI_forward_part_t16_forward_ in default = 0;
  species rna_part_UTR1_forward_part_BetI_forward_part_t16_forward_ in default = 0;
  species protein_AmeR_degtagged in default = 0;
  species ordered_polymer_complex_part_P_HlyIIR_protein_HlyIIR_degtagged_2x_forward__complex_part_P_AmeR_protein_AmeR_degtagged_forward__part_UTR1_forward_part_BetI_forward_part_t16_forward_ in default = 0;
  species ordered_polymer_part_P_HlyIIR_forward_complex_part_P_AmeR_protein_AmeR_degtagged_forward__part_UTR1_forward_part_BetI_forward_part_t16_forward_ in default = 0;
  species rna_part_P_AmeR_forward_part_UTR1_forward_part_BetI_forward_part_t16_forward_ in default = 0;
  species protein_HlyIIR_degtagged in default = 0;
  species rna_part_UTR1_forward_part_AmeR_forward_part_t16_forward_ in default = 0;
  species ordered_polymer_complex_part_P_Tet_protein_TetR_input_4x_forward__part_UTR1_forward_part_AmeR_forward_part_t16_forward_ in default = 0;
  species rna_part_UTR1_forward_part_HlyIIR_forward_part_t16_forward_ in default = 0;
  species ordered_polymer_complex_part_P_Tac_protein_LacI_input_4x_forward__part_UTR1_forward_part_HlyIIR_forward_part_t16_forward_ in default = 0;
  species rna_part_UTR1_forward_part_AmtR_forward_part_t16_forward_ in default = 0;
  species ordered_polymer_complex_complex_protein_AraC_input_2x_protein_Ara_input_2x__4x_part_P_BAD_forward__part_UTR1_forward_part_AmtR_forward_part_t16_forward_ in default = 0;
  species ordered_polymer_complex_part_P_PhlF_protein_PhlF_degtagged_3x_forward__part_P_AmtR_forward_part_UTR1_forward_part_YFP_forward_part_t16_forward_ in default = 0;
  species rna_part_UTR1_forward_part_YFP_forward_part_t16_forward_ in default = 0;
  species protein_AmtR_degtagged in default = 0;
  species ordered_polymer_complex_part_P_PhlF_protein_PhlF_degtagged_3x_forward__complex_part_P_AmtR_protein_AmtR_degtagged_forward__part_UTR1_forward_part_YFP_forward_part_t16_forward_ in default = 0;
  species ordered_polymer_part_P_PhlF_forward_complex_part_P_AmtR_protein_AmtR_degtagged_forward__part_UTR1_forward_part_YFP_forward_part_t16_forward_ in default = 0;
  species rna_part_P_AmtR_forward_part_UTR1_forward_part_YFP_forward_part_t16_forward_ in default = 0;
  species protein_PhlF_degtagged in default = 0;
  species protein_PhlF_degtagged in default = 0;
  species protein_SrpR_degtagged in default = 0;
  species protein_BetI_degtagged in default = 0;
  species protein_AmeR_degtagged in default = 0;
  species protein_HlyIIR_degtagged in default = 0;
  species protein_AmtR_degtagged in default = 0;
  species protein_YFP_degtagged in default = 0;

  // Parameters:
  kb__ = 100;
  ku__ = 10;
  ktx_P_BetI_leak_simple_transcription = 0.044;
  kb_P_BetI_BetI_degtagged_one_step_cooperative_binding = 100.29;
  ku_P_BetI_BetI_degtagged_one_step_cooperative_binding = 6.89;
  ktx_P_BetI_BetI_degtagged_simple_transcription = 0.00083;
  ktx_P_SrpR_leak_simple_transcription = 0.025;
  kb_P_SrpR_SrpR_degtagged_one_step_cooperative_binding = 101.12;
  ku_P_SrpR_SrpR_degtagged_one_step_cooperative_binding = 0.25;
  ktx_P_SrpR_SrpR_degtagged_simple_transcription = 6.75e-5;
  ktx_P_Tet_leak_simple_transcription = 0.05;
  kb__one_step_cooperative_binding = 100;
  ku__one_step_cooperative_binding = 10;
  ktx__simple_transcription = 1e-15;
  ktx_P_Tac_leak_simple_transcription = 0.05;
  ktx_P_AmeR_leak_simple_transcription = 0.039;
  kb_P_AmeR_AmeR_degtagged_one_step_cooperative_binding = 100.75;
  ku_P_AmeR_AmeR_degtagged_one_step_cooperative_binding = 2.5;
  ktx_P_AmeR_AmeR_degtagged_simple_transcription = 0.0023;
  ktx_P_HlyIIR_leak_simple_transcription = 0.03;
  kb_P_HlyIIR_HlyIIR_degtagged_one_step_cooperative_binding = 102.43;
  ku_P_HlyIIR_HlyIIR_degtagged_one_step_cooperative_binding = 0.53;
  ktx_P_HlyIIR_HlyIIR_degtagged_simple_transcription = 0.00081;
  ktx_P_BAD_protein_AraC_input_2x_protein_Ara_input_2x_simple_transcription = 0.05;
  ktx_P_AmtR_leak_simple_transcription = 0.037;
  kb_P_AmtR_AmtR_degtagged_one_step_cooperative_binding = 100.93;
  ku_P_AmtR_AmtR_degtagged_one_step_cooperative_binding = 0.75;
  ktx_P_AmtR_AmtR_degtagged_simple_transcription = 0.00079;
  ktx_P_PhlF_leak_simple_transcription = 0.05;
  kb_P_PhlF_PhlF_degtagged_one_step_cooperative_binding = 91.74;
  ku_P_PhlF_PhlF_degtagged_one_step_cooperative_binding = 0.0001;
  ktx_P_PhlF_PhlF_degtagged_simple_transcription = 0.00024;
  ktl__ = 0.05;
  kdil__ = 0.0075;

  // Reactions:
  r0: 2 protein_IPTG_input + 2 protein_LacI_input => complex_protein_IPTG_input_2x_protein_LacI_input_2x_; kb__*protein_IPTG_input^2*protein_LacI_input^2;
  r0rev: complex_protein_IPTG_input_2x_protein_LacI_input_2x_ => 2 protein_IPTG_input + 2 protein_LacI_input; ku__*complex_protein_IPTG_input_2x_protein_LacI_input_2x_;
  r1: 2 protein_aTc_input + 2 protein_TetR_input => complex_protein_TetR_input_2x_protein_aTc_input_2x_; kb__*protein_aTc_input^2*protein_TetR_input^2;
  r1rev: complex_protein_TetR_input_2x_protein_aTc_input_2x_ => 2 protein_aTc_input + 2 protein_TetR_input; ku__*complex_protein_TetR_input_2x_protein_aTc_input_2x_;
  r2: 2 protein_Ara_input + 2 protein_AraC_input => complex_protein_AraC_input_2x_protein_Ara_input_2x_; kb__*protein_Ara_input^2*protein_AraC_input^2;
  r2rev: complex_protein_AraC_input_2x_protein_Ara_input_2x_ => 2 protein_Ara_input + 2 protein_AraC_input; ku__*complex_protein_AraC_input_2x_protein_Ara_input_2x_;
  r3: ordered_polymer_complex_part_P_SrpR_protein_SrpR_degtagged_forward__part_P_BetI_forward_part_UTR1_forward_part_PhlF_forward_part_t16_forward_ => ordered_polymer_complex_part_P_SrpR_protein_SrpR_degtagged_forward__part_P_BetI_forward_part_UTR1_forward_part_PhlF_forward_part_t16_forward_ + rna_part_UTR1_forward_part_PhlF_forward_part_t16_forward_; ktx_P_BetI_leak_simple_transcription*ordered_polymer_complex_part_P_SrpR_protein_SrpR_degtagged_forward__part_P_BetI_forward_part_UTR1_forward_part_PhlF_forward_part_t16_forward_;
  r4: 2 protein_BetI_degtagged + ordered_polymer_complex_part_P_SrpR_protein_SrpR_degtagged_forward__part_P_BetI_forward_part_UTR1_forward_part_PhlF_forward_part_t16_forward_ => ordered_polymer_complex_part_P_SrpR_protein_SrpR_degtagged_forward__complex_part_P_BetI_protein_BetI_degtagged_2x_forward__part_UTR1_forward_part_PhlF_forward_part_t16_forward_; kb_P_BetI_BetI_degtagged_one_step_cooperative_binding*protein_BetI_degtagged^2*ordered_polymer_complex_part_P_SrpR_protein_SrpR_degtagged_forward__part_P_BetI_forward_part_UTR1_forward_part_PhlF_forward_part_t16_forward_;
  r4rev: ordered_polymer_complex_part_P_SrpR_protein_SrpR_degtagged_forward__complex_part_P_BetI_protein_BetI_degtagged_2x_forward__part_UTR1_forward_part_PhlF_forward_part_t16_forward_ => 2 protein_BetI_degtagged + ordered_polymer_complex_part_P_SrpR_protein_SrpR_degtagged_forward__part_P_BetI_forward_part_UTR1_forward_part_PhlF_forward_part_t16_forward_; ku_P_BetI_BetI_degtagged_one_step_cooperative_binding*ordered_polymer_complex_part_P_SrpR_protein_SrpR_degtagged_forward__complex_part_P_BetI_protein_BetI_degtagged_2x_forward__part_UTR1_forward_part_PhlF_forward_part_t16_forward_;
  r5: ordered_polymer_complex_part_P_SrpR_protein_SrpR_degtagged_forward__complex_part_P_BetI_protein_BetI_degtagged_2x_forward__part_UTR1_forward_part_PhlF_forward_part_t16_forward_ => ordered_polymer_complex_part_P_SrpR_protein_SrpR_degtagged_forward__complex_part_P_BetI_protein_BetI_degtagged_2x_forward__part_UTR1_forward_part_PhlF_forward_part_t16_forward_ + rna_part_UTR1_forward_part_PhlF_forward_part_t16_forward_; ktx_P_BetI_BetI_degtagged_simple_transcription*ordered_polymer_complex_part_P_SrpR_protein_SrpR_degtagged_forward__complex_part_P_BetI_protein_BetI_degtagged_2x_forward__part_UTR1_forward_part_PhlF_forward_part_t16_forward_;
  r6: ordered_polymer_part_P_SrpR_forward_complex_part_P_BetI_protein_BetI_degtagged_2x_forward__part_UTR1_forward_part_PhlF_forward_part_t16_forward_ => ordered_polymer_part_P_SrpR_forward_complex_part_P_BetI_protein_BetI_degtagged_2x_forward__part_UTR1_forward_part_PhlF_forward_part_t16_forward_ + rna_part_P_BetI_forward_part_UTR1_forward_part_PhlF_forward_part_t16_forward_; ktx_P_SrpR_leak_simple_transcription*ordered_polymer_part_P_SrpR_forward_complex_part_P_BetI_protein_BetI_degtagged_2x_forward__part_UTR1_forward_part_PhlF_forward_part_t16_forward_;
  r7: protein_SrpR_degtagged + ordered_polymer_part_P_SrpR_forward_complex_part_P_BetI_protein_BetI_degtagged_2x_forward__part_UTR1_forward_part_PhlF_forward_part_t16_forward_ => ordered_polymer_complex_part_P_SrpR_protein_SrpR_degtagged_forward__complex_part_P_BetI_protein_BetI_degtagged_2x_forward__part_UTR1_forward_part_PhlF_forward_part_t16_forward_; kb_P_SrpR_SrpR_degtagged_one_step_cooperative_binding*protein_SrpR_degtagged*ordered_polymer_part_P_SrpR_forward_complex_part_P_BetI_protein_BetI_degtagged_2x_forward__part_UTR1_forward_part_PhlF_forward_part_t16_forward_;
  r7rev: ordered_polymer_complex_part_P_SrpR_protein_SrpR_degtagged_forward__complex_part_P_BetI_protein_BetI_degtagged_2x_forward__part_UTR1_forward_part_PhlF_forward_part_t16_forward_ => protein_SrpR_degtagged + ordered_polymer_part_P_SrpR_forward_complex_part_P_BetI_protein_BetI_degtagged_2x_forward__part_UTR1_forward_part_PhlF_forward_part_t16_forward_; ku_P_SrpR_SrpR_degtagged_one_step_cooperative_binding*ordered_polymer_complex_part_P_SrpR_protein_SrpR_degtagged_forward__complex_part_P_BetI_protein_BetI_degtagged_2x_forward__part_UTR1_forward_part_PhlF_forward_part_t16_forward_;
  r8: ordered_polymer_complex_part_P_SrpR_protein_SrpR_degtagged_forward__complex_part_P_BetI_protein_BetI_degtagged_2x_forward__part_UTR1_forward_part_PhlF_forward_part_t16_forward_ => ordered_polymer_complex_part_P_SrpR_protein_SrpR_degtagged_forward__complex_part_P_BetI_protein_BetI_degtagged_2x_forward__part_UTR1_forward_part_PhlF_forward_part_t16_forward_ + rna_part_P_BetI_forward_part_UTR1_forward_part_PhlF_forward_part_t16_forward_; ktx_P_SrpR_SrpR_degtagged_simple_transcription*ordered_polymer_complex_part_P_SrpR_protein_SrpR_degtagged_forward__complex_part_P_BetI_protein_BetI_degtagged_2x_forward__part_UTR1_forward_part_PhlF_forward_part_t16_forward_;
  r9: dna_part_P_SrpR_forward_part_P_BetI_forward_part_UTR1_forward_part_PhlF_forward_part_t16_forward_ => dna_part_P_SrpR_forward_part_P_BetI_forward_part_UTR1_forward_part_PhlF_forward_part_t16_forward_ + rna_part_P_BetI_forward_part_UTR1_forward_part_PhlF_forward_part_t16_forward_; ktx_P_SrpR_leak_simple_transcription*dna_part_P_SrpR_forward_part_P_BetI_forward_part_UTR1_forward_part_PhlF_forward_part_t16_forward_;
  r10: protein_SrpR_degtagged + dna_part_P_SrpR_forward_part_P_BetI_forward_part_UTR1_forward_part_PhlF_forward_part_t16_forward_ => ordered_polymer_complex_part_P_SrpR_protein_SrpR_degtagged_forward__part_P_BetI_forward_part_UTR1_forward_part_PhlF_forward_part_t16_forward_; kb_P_SrpR_SrpR_degtagged_one_step_cooperative_binding*protein_SrpR_degtagged*dna_part_P_SrpR_forward_part_P_BetI_forward_part_UTR1_forward_part_PhlF_forward_part_t16_forward_;
  r10rev: ordered_polymer_complex_part_P_SrpR_protein_SrpR_degtagged_forward__part_P_BetI_forward_part_UTR1_forward_part_PhlF_forward_part_t16_forward_ => protein_SrpR_degtagged + dna_part_P_SrpR_forward_part_P_BetI_forward_part_UTR1_forward_part_PhlF_forward_part_t16_forward_; ku_P_SrpR_SrpR_degtagged_one_step_cooperative_binding*ordered_polymer_complex_part_P_SrpR_protein_SrpR_degtagged_forward__part_P_BetI_forward_part_UTR1_forward_part_PhlF_forward_part_t16_forward_;
  r11: ordered_polymer_complex_part_P_SrpR_protein_SrpR_degtagged_forward__part_P_BetI_forward_part_UTR1_forward_part_PhlF_forward_part_t16_forward_ => ordered_polymer_complex_part_P_SrpR_protein_SrpR_degtagged_forward__part_P_BetI_forward_part_UTR1_forward_part_PhlF_forward_part_t16_forward_ + rna_part_P_BetI_forward_part_UTR1_forward_part_PhlF_forward_part_t16_forward_; ktx_P_SrpR_SrpR_degtagged_simple_transcription*ordered_polymer_complex_part_P_SrpR_protein_SrpR_degtagged_forward__part_P_BetI_forward_part_UTR1_forward_part_PhlF_forward_part_t16_forward_;
  r12: dna_part_P_SrpR_forward_part_P_BetI_forward_part_UTR1_forward_part_PhlF_forward_part_t16_forward_ => dna_part_P_SrpR_forward_part_P_BetI_forward_part_UTR1_forward_part_PhlF_forward_part_t16_forward_ + rna_part_UTR1_forward_part_PhlF_forward_part_t16_forward_; ktx_P_BetI_leak_simple_transcription*dna_part_P_SrpR_forward_part_P_BetI_forward_part_UTR1_forward_part_PhlF_forward_part_t16_forward_;
  r13: 2 protein_BetI_degtagged + dna_part_P_SrpR_forward_part_P_BetI_forward_part_UTR1_forward_part_PhlF_forward_part_t16_forward_ => ordered_polymer_part_P_SrpR_forward_complex_part_P_BetI_protein_BetI_degtagged_2x_forward__part_UTR1_forward_part_PhlF_forward_part_t16_forward_; kb_P_BetI_BetI_degtagged_one_step_cooperative_binding*protein_BetI_degtagged^2*dna_part_P_SrpR_forward_part_P_BetI_forward_part_UTR1_forward_part_PhlF_forward_part_t16_forward_;
  r13rev: ordered_polymer_part_P_SrpR_forward_complex_part_P_BetI_protein_BetI_degtagged_2x_forward__part_UTR1_forward_part_PhlF_forward_part_t16_forward_ => 2 protein_BetI_degtagged + dna_part_P_SrpR_forward_part_P_BetI_forward_part_UTR1_forward_part_PhlF_forward_part_t16_forward_; ku_P_BetI_BetI_degtagged_one_step_cooperative_binding*ordered_polymer_part_P_SrpR_forward_complex_part_P_BetI_protein_BetI_degtagged_2x_forward__part_UTR1_forward_part_PhlF_forward_part_t16_forward_;
  r14: ordered_polymer_part_P_SrpR_forward_complex_part_P_BetI_protein_BetI_degtagged_2x_forward__part_UTR1_forward_part_PhlF_forward_part_t16_forward_ => ordered_polymer_part_P_SrpR_forward_complex_part_P_BetI_protein_BetI_degtagged_2x_forward__part_UTR1_forward_part_PhlF_forward_part_t16_forward_ + rna_part_UTR1_forward_part_PhlF_forward_part_t16_forward_; ktx_P_BetI_BetI_degtagged_simple_transcription*ordered_polymer_part_P_SrpR_forward_complex_part_P_BetI_protein_BetI_degtagged_2x_forward__part_UTR1_forward_part_PhlF_forward_part_t16_forward_;
  r15: ordered_polymer_complex_part_P_Tac_protein_LacI_input_4x_forward__part_P_Tet_forward_part_UTR1_forward_part_SrpR_forward_part_t16_forward_ => ordered_polymer_complex_part_P_Tac_protein_LacI_input_4x_forward__part_P_Tet_forward_part_UTR1_forward_part_SrpR_forward_part_t16_forward_ + rna_part_UTR1_forward_part_SrpR_forward_part_t16_forward_; ktx_P_Tet_leak_simple_transcription*ordered_polymer_complex_part_P_Tac_protein_LacI_input_4x_forward__part_P_Tet_forward_part_UTR1_forward_part_SrpR_forward_part_t16_forward_;
  r16: 4 protein_TetR_input + ordered_polymer_complex_part_P_Tac_protein_LacI_input_4x_forward__part_P_Tet_forward_part_UTR1_forward_part_SrpR_forward_part_t16_forward_ => ordered_polymer_complex_part_P_Tac_protein_LacI_input_4x_forward__complex_part_P_Tet_protein_TetR_input_4x_forward__part_UTR1_forward_part_SrpR_forward_part_t16_forward_; kb__one_step_cooperative_binding*protein_TetR_input^4*ordered_polymer_complex_part_P_Tac_protein_LacI_input_4x_forward__part_P_Tet_forward_part_UTR1_forward_part_SrpR_forward_part_t16_forward_;
  r16rev: ordered_polymer_complex_part_P_Tac_protein_LacI_input_4x_forward__complex_part_P_Tet_protein_TetR_input_4x_forward__part_UTR1_forward_part_SrpR_forward_part_t16_forward_ => 4 protein_TetR_input + ordered_polymer_complex_part_P_Tac_protein_LacI_input_4x_forward__part_P_Tet_forward_part_UTR1_forward_part_SrpR_forward_part_t16_forward_; ku__one_step_cooperative_binding*ordered_polymer_complex_part_P_Tac_protein_LacI_input_4x_forward__complex_part_P_Tet_protein_TetR_input_4x_forward__part_UTR1_forward_part_SrpR_forward_part_t16_forward_;
  r17: ordered_polymer_complex_part_P_Tac_protein_LacI_input_4x_forward__complex_part_P_Tet_protein_TetR_input_4x_forward__part_UTR1_forward_part_SrpR_forward_part_t16_forward_ => ordered_polymer_complex_part_P_Tac_protein_LacI_input_4x_forward__complex_part_P_Tet_protein_TetR_input_4x_forward__part_UTR1_forward_part_SrpR_forward_part_t16_forward_ + rna_part_UTR1_forward_part_SrpR_forward_part_t16_forward_; ktx__simple_transcription*ordered_polymer_complex_part_P_Tac_protein_LacI_input_4x_forward__complex_part_P_Tet_protein_TetR_input_4x_forward__part_UTR1_forward_part_SrpR_forward_part_t16_forward_;
  r18: ordered_polymer_part_P_Tac_forward_complex_part_P_Tet_protein_TetR_input_4x_forward__part_UTR1_forward_part_SrpR_forward_part_t16_forward_ => ordered_polymer_part_P_Tac_forward_complex_part_P_Tet_protein_TetR_input_4x_forward__part_UTR1_forward_part_SrpR_forward_part_t16_forward_ + rna_part_P_Tet_forward_part_UTR1_forward_part_SrpR_forward_part_t16_forward_; ktx_P_Tac_leak_simple_transcription*ordered_polymer_part_P_Tac_forward_complex_part_P_Tet_protein_TetR_input_4x_forward__part_UTR1_forward_part_SrpR_forward_part_t16_forward_;
  r19: 4 protein_LacI_input + ordered_polymer_part_P_Tac_forward_complex_part_P_Tet_protein_TetR_input_4x_forward__part_UTR1_forward_part_SrpR_forward_part_t16_forward_ => ordered_polymer_complex_part_P_Tac_protein_LacI_input_4x_forward__complex_part_P_Tet_protein_TetR_input_4x_forward__part_UTR1_forward_part_SrpR_forward_part_t16_forward_; kb__one_step_cooperative_binding*protein_LacI_input^4*ordered_polymer_part_P_Tac_forward_complex_part_P_Tet_protein_TetR_input_4x_forward__part_UTR1_forward_part_SrpR_forward_part_t16_forward_;
  r19rev: ordered_polymer_complex_part_P_Tac_protein_LacI_input_4x_forward__complex_part_P_Tet_protein_TetR_input_4x_forward__part_UTR1_forward_part_SrpR_forward_part_t16_forward_ => 4 protein_LacI_input + ordered_polymer_part_P_Tac_forward_complex_part_P_Tet_protein_TetR_input_4x_forward__part_UTR1_forward_part_SrpR_forward_part_t16_forward_; ku__one_step_cooperative_binding*ordered_polymer_complex_part_P_Tac_protein_LacI_input_4x_forward__complex_part_P_Tet_protein_TetR_input_4x_forward__part_UTR1_forward_part_SrpR_forward_part_t16_forward_;
  r20: ordered_polymer_complex_part_P_Tac_protein_LacI_input_4x_forward__complex_part_P_Tet_protein_TetR_input_4x_forward__part_UTR1_forward_part_SrpR_forward_part_t16_forward_ => ordered_polymer_complex_part_P_Tac_protein_LacI_input_4x_forward__complex_part_P_Tet_protein_TetR_input_4x_forward__part_UTR1_forward_part_SrpR_forward_part_t16_forward_ + rna_part_P_Tet_forward_part_UTR1_forward_part_SrpR_forward_part_t16_forward_; ktx__simple_transcription*ordered_polymer_complex_part_P_Tac_protein_LacI_input_4x_forward__complex_part_P_Tet_protein_TetR_input_4x_forward__part_UTR1_forward_part_SrpR_forward_part_t16_forward_;
  r21: dna_part_P_Tac_forward_part_P_Tet_forward_part_UTR1_forward_part_SrpR_forward_part_t16_forward_ => dna_part_P_Tac_forward_part_P_Tet_forward_part_UTR1_forward_part_SrpR_forward_part_t16_forward_ + rna_part_P_Tet_forward_part_UTR1_forward_part_SrpR_forward_part_t16_forward_; ktx_P_Tac_leak_simple_transcription*dna_part_P_Tac_forward_part_P_Tet_forward_part_UTR1_forward_part_SrpR_forward_part_t16_forward_;
  r22: 4 protein_LacI_input + dna_part_P_Tac_forward_part_P_Tet_forward_part_UTR1_forward_part_SrpR_forward_part_t16_forward_ => ordered_polymer_complex_part_P_Tac_protein_LacI_input_4x_forward__part_P_Tet_forward_part_UTR1_forward_part_SrpR_forward_part_t16_forward_; kb__one_step_cooperative_binding*protein_LacI_input^4*dna_part_P_Tac_forward_part_P_Tet_forward_part_UTR1_forward_part_SrpR_forward_part_t16_forward_;
  r22rev: ordered_polymer_complex_part_P_Tac_protein_LacI_input_4x_forward__part_P_Tet_forward_part_UTR1_forward_part_SrpR_forward_part_t16_forward_ => 4 protein_LacI_input + dna_part_P_Tac_forward_part_P_Tet_forward_part_UTR1_forward_part_SrpR_forward_part_t16_forward_; ku__one_step_cooperative_binding*ordered_polymer_complex_part_P_Tac_protein_LacI_input_4x_forward__part_P_Tet_forward_part_UTR1_forward_part_SrpR_forward_part_t16_forward_;
  r23: ordered_polymer_complex_part_P_Tac_protein_LacI_input_4x_forward__part_P_Tet_forward_part_UTR1_forward_part_SrpR_forward_part_t16_forward_ => ordered_polymer_complex_part_P_Tac_protein_LacI_input_4x_forward__part_P_Tet_forward_part_UTR1_forward_part_SrpR_forward_part_t16_forward_ + rna_part_P_Tet_forward_part_UTR1_forward_part_SrpR_forward_part_t16_forward_; ktx__simple_transcription*ordered_polymer_complex_part_P_Tac_protein_LacI_input_4x_forward__part_P_Tet_forward_part_UTR1_forward_part_SrpR_forward_part_t16_forward_;
  r24: dna_part_P_Tac_forward_part_P_Tet_forward_part_UTR1_forward_part_SrpR_forward_part_t16_forward_ => dna_part_P_Tac_forward_part_P_Tet_forward_part_UTR1_forward_part_SrpR_forward_part_t16_forward_ + rna_part_UTR1_forward_part_SrpR_forward_part_t16_forward_; ktx_P_Tet_leak_simple_transcription*dna_part_P_Tac_forward_part_P_Tet_forward_part_UTR1_forward_part_SrpR_forward_part_t16_forward_;
  r25: 4 protein_TetR_input + dna_part_P_Tac_forward_part_P_Tet_forward_part_UTR1_forward_part_SrpR_forward_part_t16_forward_ => ordered_polymer_part_P_Tac_forward_complex_part_P_Tet_protein_TetR_input_4x_forward__part_UTR1_forward_part_SrpR_forward_part_t16_forward_; kb__one_step_cooperative_binding*protein_TetR_input^4*dna_part_P_Tac_forward_part_P_Tet_forward_part_UTR1_forward_part_SrpR_forward_part_t16_forward_;
  r25rev: ordered_polymer_part_P_Tac_forward_complex_part_P_Tet_protein_TetR_input_4x_forward__part_UTR1_forward_part_SrpR_forward_part_t16_forward_ => 4 protein_TetR_input + dna_part_P_Tac_forward_part_P_Tet_forward_part_UTR1_forward_part_SrpR_forward_part_t16_forward_; ku__one_step_cooperative_binding*ordered_polymer_part_P_Tac_forward_complex_part_P_Tet_protein_TetR_input_4x_forward__part_UTR1_forward_part_SrpR_forward_part_t16_forward_;
  r26: ordered_polymer_part_P_Tac_forward_complex_part_P_Tet_protein_TetR_input_4x_forward__part_UTR1_forward_part_SrpR_forward_part_t16_forward_ => ordered_polymer_part_P_Tac_forward_complex_part_P_Tet_protein_TetR_input_4x_forward__part_UTR1_forward_part_SrpR_forward_part_t16_forward_ + rna_part_UTR1_forward_part_SrpR_forward_part_t16_forward_; ktx__simple_transcription*ordered_polymer_part_P_Tac_forward_complex_part_P_Tet_protein_TetR_input_4x_forward__part_UTR1_forward_part_SrpR_forward_part_t16_forward_;
  r27: ordered_polymer_complex_part_P_HlyIIR_protein_HlyIIR_degtagged_2x_forward__part_P_AmeR_forward_part_UTR1_forward_part_BetI_forward_part_t16_forward_ => ordered_polymer_complex_part_P_HlyIIR_protein_HlyIIR_degtagged_2x_forward__part_P_AmeR_forward_part_UTR1_forward_part_BetI_forward_part_t16_forward_ + rna_part_UTR1_forward_part_BetI_forward_part_t16_forward_; ktx_P_AmeR_leak_simple_transcription*ordered_polymer_complex_part_P_HlyIIR_protein_HlyIIR_degtagged_2x_forward__part_P_AmeR_forward_part_UTR1_forward_part_BetI_forward_part_t16_forward_;
  r28: protein_AmeR_degtagged + ordered_polymer_complex_part_P_HlyIIR_protein_HlyIIR_degtagged_2x_forward__part_P_AmeR_forward_part_UTR1_forward_part_BetI_forward_part_t16_forward_ => ordered_polymer_complex_part_P_HlyIIR_protein_HlyIIR_degtagged_2x_forward__complex_part_P_AmeR_protein_AmeR_degtagged_forward__part_UTR1_forward_part_BetI_forward_part_t16_forward_; kb_P_AmeR_AmeR_degtagged_one_step_cooperative_binding*protein_AmeR_degtagged*ordered_polymer_complex_part_P_HlyIIR_protein_HlyIIR_degtagged_2x_forward__part_P_AmeR_forward_part_UTR1_forward_part_BetI_forward_part_t16_forward_;
  r28rev: ordered_polymer_complex_part_P_HlyIIR_protein_HlyIIR_degtagged_2x_forward__complex_part_P_AmeR_protein_AmeR_degtagged_forward__part_UTR1_forward_part_BetI_forward_part_t16_forward_ => protein_AmeR_degtagged + ordered_polymer_complex_part_P_HlyIIR_protein_HlyIIR_degtagged_2x_forward__part_P_AmeR_forward_part_UTR1_forward_part_BetI_forward_part_t16_forward_; ku_P_AmeR_AmeR_degtagged_one_step_cooperative_binding*ordered_polymer_complex_part_P_HlyIIR_protein_HlyIIR_degtagged_2x_forward__complex_part_P_AmeR_protein_AmeR_degtagged_forward__part_UTR1_forward_part_BetI_forward_part_t16_forward_;
  r29: ordered_polymer_complex_part_P_HlyIIR_protein_HlyIIR_degtagged_2x_forward__complex_part_P_AmeR_protein_AmeR_degtagged_forward__part_UTR1_forward_part_BetI_forward_part_t16_forward_ => ordered_polymer_complex_part_P_HlyIIR_protein_HlyIIR_degtagged_2x_forward__complex_part_P_AmeR_protein_AmeR_degtagged_forward__part_UTR1_forward_part_BetI_forward_part_t16_forward_ + rna_part_UTR1_forward_part_BetI_forward_part_t16_forward_; ktx_P_AmeR_AmeR_degtagged_simple_transcription*ordered_polymer_complex_part_P_HlyIIR_protein_HlyIIR_degtagged_2x_forward__complex_part_P_AmeR_protein_AmeR_degtagged_forward__part_UTR1_forward_part_BetI_forward_part_t16_forward_;
  r30: ordered_polymer_part_P_HlyIIR_forward_complex_part_P_AmeR_protein_AmeR_degtagged_forward__part_UTR1_forward_part_BetI_forward_part_t16_forward_ => ordered_polymer_part_P_HlyIIR_forward_complex_part_P_AmeR_protein_AmeR_degtagged_forward__part_UTR1_forward_part_BetI_forward_part_t16_forward_ + rna_part_P_AmeR_forward_part_UTR1_forward_part_BetI_forward_part_t16_forward_; ktx_P_HlyIIR_leak_simple_transcription*ordered_polymer_part_P_HlyIIR_forward_complex_part_P_AmeR_protein_AmeR_degtagged_forward__part_UTR1_forward_part_BetI_forward_part_t16_forward_;
  r31: 2 protein_HlyIIR_degtagged + ordered_polymer_part_P_HlyIIR_forward_complex_part_P_AmeR_protein_AmeR_degtagged_forward__part_UTR1_forward_part_BetI_forward_part_t16_forward_ => ordered_polymer_complex_part_P_HlyIIR_protein_HlyIIR_degtagged_2x_forward__complex_part_P_AmeR_protein_AmeR_degtagged_forward__part_UTR1_forward_part_BetI_forward_part_t16_forward_; kb_P_HlyIIR_HlyIIR_degtagged_one_step_cooperative_binding*protein_HlyIIR_degtagged^2*ordered_polymer_part_P_HlyIIR_forward_complex_part_P_AmeR_protein_AmeR_degtagged_forward__part_UTR1_forward_part_BetI_forward_part_t16_forward_;
  r31rev: ordered_polymer_complex_part_P_HlyIIR_protein_HlyIIR_degtagged_2x_forward__complex_part_P_AmeR_protein_AmeR_degtagged_forward__part_UTR1_forward_part_BetI_forward_part_t16_forward_ => 2 protein_HlyIIR_degtagged + ordered_polymer_part_P_HlyIIR_forward_complex_part_P_AmeR_protein_AmeR_degtagged_forward__part_UTR1_forward_part_BetI_forward_part_t16_forward_; ku_P_HlyIIR_HlyIIR_degtagged_one_step_cooperative_binding*ordered_polymer_complex_part_P_HlyIIR_protein_HlyIIR_degtagged_2x_forward__complex_part_P_AmeR_protein_AmeR_degtagged_forward__part_UTR1_forward_part_BetI_forward_part_t16_forward_;
  r32: ordered_polymer_complex_part_P_HlyIIR_protein_HlyIIR_degtagged_2x_forward__complex_part_P_AmeR_protein_AmeR_degtagged_forward__part_UTR1_forward_part_BetI_forward_part_t16_forward_ => ordered_polymer_complex_part_P_HlyIIR_protein_HlyIIR_degtagged_2x_forward__complex_part_P_AmeR_protein_AmeR_degtagged_forward__part_UTR1_forward_part_BetI_forward_part_t16_forward_ + rna_part_P_AmeR_forward_part_UTR1_forward_part_BetI_forward_part_t16_forward_; ktx_P_HlyIIR_HlyIIR_degtagged_simple_transcription*ordered_polymer_complex_part_P_HlyIIR_protein_HlyIIR_degtagged_2x_forward__complex_part_P_AmeR_protein_AmeR_degtagged_forward__part_UTR1_forward_part_BetI_forward_part_t16_forward_;
  r33: dna_part_P_HlyIIR_forward_part_P_AmeR_forward_part_UTR1_forward_part_BetI_forward_part_t16_forward_ => dna_part_P_HlyIIR_forward_part_P_AmeR_forward_part_UTR1_forward_part_BetI_forward_part_t16_forward_ + rna_part_P_AmeR_forward_part_UTR1_forward_part_BetI_forward_part_t16_forward_; ktx_P_HlyIIR_leak_simple_transcription*dna_part_P_HlyIIR_forward_part_P_AmeR_forward_part_UTR1_forward_part_BetI_forward_part_t16_forward_;
  r34: 2 protein_HlyIIR_degtagged + dna_part_P_HlyIIR_forward_part_P_AmeR_forward_part_UTR1_forward_part_BetI_forward_part_t16_forward_ => ordered_polymer_complex_part_P_HlyIIR_protein_HlyIIR_degtagged_2x_forward__part_P_AmeR_forward_part_UTR1_forward_part_BetI_forward_part_t16_forward_; kb_P_HlyIIR_HlyIIR_degtagged_one_step_cooperative_binding*protein_HlyIIR_degtagged^2*dna_part_P_HlyIIR_forward_part_P_AmeR_forward_part_UTR1_forward_part_BetI_forward_part_t16_forward_;
  r34rev: ordered_polymer_complex_part_P_HlyIIR_protein_HlyIIR_degtagged_2x_forward__part_P_AmeR_forward_part_UTR1_forward_part_BetI_forward_part_t16_forward_ => 2 protein_HlyIIR_degtagged + dna_part_P_HlyIIR_forward_part_P_AmeR_forward_part_UTR1_forward_part_BetI_forward_part_t16_forward_; ku_P_HlyIIR_HlyIIR_degtagged_one_step_cooperative_binding*ordered_polymer_complex_part_P_HlyIIR_protein_HlyIIR_degtagged_2x_forward__part_P_AmeR_forward_part_UTR1_forward_part_BetI_forward_part_t16_forward_;
  r35: ordered_polymer_complex_part_P_HlyIIR_protein_HlyIIR_degtagged_2x_forward__part_P_AmeR_forward_part_UTR1_forward_part_BetI_forward_part_t16_forward_ => ordered_polymer_complex_part_P_HlyIIR_protein_HlyIIR_degtagged_2x_forward__part_P_AmeR_forward_part_UTR1_forward_part_BetI_forward_part_t16_forward_ + rna_part_P_AmeR_forward_part_UTR1_forward_part_BetI_forward_part_t16_forward_; ktx_P_HlyIIR_HlyIIR_degtagged_simple_transcription*ordered_polymer_complex_part_P_HlyIIR_protein_HlyIIR_degtagged_2x_forward__part_P_AmeR_forward_part_UTR1_forward_part_BetI_forward_part_t16_forward_;
  r36: dna_part_P_HlyIIR_forward_part_P_AmeR_forward_part_UTR1_forward_part_BetI_forward_part_t16_forward_ => dna_part_P_HlyIIR_forward_part_P_AmeR_forward_part_UTR1_forward_part_BetI_forward_part_t16_forward_ + rna_part_UTR1_forward_part_BetI_forward_part_t16_forward_; ktx_P_AmeR_leak_simple_transcription*dna_part_P_HlyIIR_forward_part_P_AmeR_forward_part_UTR1_forward_part_BetI_forward_part_t16_forward_;
  r37: protein_AmeR_degtagged + dna_part_P_HlyIIR_forward_part_P_AmeR_forward_part_UTR1_forward_part_BetI_forward_part_t16_forward_ => ordered_polymer_part_P_HlyIIR_forward_complex_part_P_AmeR_protein_AmeR_degtagged_forward__part_UTR1_forward_part_BetI_forward_part_t16_forward_; kb_P_AmeR_AmeR_degtagged_one_step_cooperative_binding*protein_AmeR_degtagged*dna_part_P_HlyIIR_forward_part_P_AmeR_forward_part_UTR1_forward_part_BetI_forward_part_t16_forward_;
  r37rev: ordered_polymer_part_P_HlyIIR_forward_complex_part_P_AmeR_protein_AmeR_degtagged_forward__part_UTR1_forward_part_BetI_forward_part_t16_forward_ => protein_AmeR_degtagged + dna_part_P_HlyIIR_forward_part_P_AmeR_forward_part_UTR1_forward_part_BetI_forward_part_t16_forward_; ku_P_AmeR_AmeR_degtagged_one_step_cooperative_binding*ordered_polymer_part_P_HlyIIR_forward_complex_part_P_AmeR_protein_AmeR_degtagged_forward__part_UTR1_forward_part_BetI_forward_part_t16_forward_;
  r38: ordered_polymer_part_P_HlyIIR_forward_complex_part_P_AmeR_protein_AmeR_degtagged_forward__part_UTR1_forward_part_BetI_forward_part_t16_forward_ => ordered_polymer_part_P_HlyIIR_forward_complex_part_P_AmeR_protein_AmeR_degtagged_forward__part_UTR1_forward_part_BetI_forward_part_t16_forward_ + rna_part_UTR1_forward_part_BetI_forward_part_t16_forward_; ktx_P_AmeR_AmeR_degtagged_simple_transcription*ordered_polymer_part_P_HlyIIR_forward_complex_part_P_AmeR_protein_AmeR_degtagged_forward__part_UTR1_forward_part_BetI_forward_part_t16_forward_;
  r39: dna_part_P_Tet_forward_part_UTR1_forward_part_AmeR_forward_part_t16_forward_ => dna_part_P_Tet_forward_part_UTR1_forward_part_AmeR_forward_part_t16_forward_ + rna_part_UTR1_forward_part_AmeR_forward_part_t16_forward_; ktx_P_Tet_leak_simple_transcription*dna_part_P_Tet_forward_part_UTR1_forward_part_AmeR_forward_part_t16_forward_;
  r40: 4 protein_TetR_input + dna_part_P_Tet_forward_part_UTR1_forward_part_AmeR_forward_part_t16_forward_ => ordered_polymer_complex_part_P_Tet_protein_TetR_input_4x_forward__part_UTR1_forward_part_AmeR_forward_part_t16_forward_; kb__one_step_cooperative_binding*protein_TetR_input^4*dna_part_P_Tet_forward_part_UTR1_forward_part_AmeR_forward_part_t16_forward_;
  r40rev: ordered_polymer_complex_part_P_Tet_protein_TetR_input_4x_forward__part_UTR1_forward_part_AmeR_forward_part_t16_forward_ => 4 protein_TetR_input + dna_part_P_Tet_forward_part_UTR1_forward_part_AmeR_forward_part_t16_forward_; ku__one_step_cooperative_binding*ordered_polymer_complex_part_P_Tet_protein_TetR_input_4x_forward__part_UTR1_forward_part_AmeR_forward_part_t16_forward_;
  r41: ordered_polymer_complex_part_P_Tet_protein_TetR_input_4x_forward__part_UTR1_forward_part_AmeR_forward_part_t16_forward_ => ordered_polymer_complex_part_P_Tet_protein_TetR_input_4x_forward__part_UTR1_forward_part_AmeR_forward_part_t16_forward_ + rna_part_UTR1_forward_part_AmeR_forward_part_t16_forward_; ktx__simple_transcription*ordered_polymer_complex_part_P_Tet_protein_TetR_input_4x_forward__part_UTR1_forward_part_AmeR_forward_part_t16_forward_;
  r42: dna_part_P_Tac_forward_part_UTR1_forward_part_HlyIIR_forward_part_t16_forward_ => dna_part_P_Tac_forward_part_UTR1_forward_part_HlyIIR_forward_part_t16_forward_ + rna_part_UTR1_forward_part_HlyIIR_forward_part_t16_forward_; ktx_P_Tac_leak_simple_transcription*dna_part_P_Tac_forward_part_UTR1_forward_part_HlyIIR_forward_part_t16_forward_;
  r43: 4 protein_LacI_input + dna_part_P_Tac_forward_part_UTR1_forward_part_HlyIIR_forward_part_t16_forward_ => ordered_polymer_complex_part_P_Tac_protein_LacI_input_4x_forward__part_UTR1_forward_part_HlyIIR_forward_part_t16_forward_; kb__one_step_cooperative_binding*protein_LacI_input^4*dna_part_P_Tac_forward_part_UTR1_forward_part_HlyIIR_forward_part_t16_forward_;
  r43rev: ordered_polymer_complex_part_P_Tac_protein_LacI_input_4x_forward__part_UTR1_forward_part_HlyIIR_forward_part_t16_forward_ => 4 protein_LacI_input + dna_part_P_Tac_forward_part_UTR1_forward_part_HlyIIR_forward_part_t16_forward_; ku__one_step_cooperative_binding*ordered_polymer_complex_part_P_Tac_protein_LacI_input_4x_forward__part_UTR1_forward_part_HlyIIR_forward_part_t16_forward_;
  r44: ordered_polymer_complex_part_P_Tac_protein_LacI_input_4x_forward__part_UTR1_forward_part_HlyIIR_forward_part_t16_forward_ => ordered_polymer_complex_part_P_Tac_protein_LacI_input_4x_forward__part_UTR1_forward_part_HlyIIR_forward_part_t16_forward_ + rna_part_UTR1_forward_part_HlyIIR_forward_part_t16_forward_; ktx__simple_transcription*ordered_polymer_complex_part_P_Tac_protein_LacI_input_4x_forward__part_UTR1_forward_part_HlyIIR_forward_part_t16_forward_;
  r45: dna_part_P_BAD_forward_part_UTR1_forward_part_AmtR_forward_part_t16_forward_ => dna_part_P_BAD_forward_part_UTR1_forward_part_AmtR_forward_part_t16_forward_ + rna_part_UTR1_forward_part_AmtR_forward_part_t16_forward_; ktx__simple_transcription*dna_part_P_BAD_forward_part_UTR1_forward_part_AmtR_forward_part_t16_forward_;
  r46: 4 complex_protein_AraC_input_2x_protein_Ara_input_2x_ + dna_part_P_BAD_forward_part_UTR1_forward_part_AmtR_forward_part_t16_forward_ => ordered_polymer_complex_complex_protein_AraC_input_2x_protein_Ara_input_2x__4x_part_P_BAD_forward__part_UTR1_forward_part_AmtR_forward_part_t16_forward_; kb__one_step_cooperative_binding*complex_protein_AraC_input_2x_protein_Ara_input_2x_^4*dna_part_P_BAD_forward_part_UTR1_forward_part_AmtR_forward_part_t16_forward_;
  r46rev: ordered_polymer_complex_complex_protein_AraC_input_2x_protein_Ara_input_2x__4x_part_P_BAD_forward__part_UTR1_forward_part_AmtR_forward_part_t16_forward_ => 4 complex_protein_AraC_input_2x_protein_Ara_input_2x_ + dna_part_P_BAD_forward_part_UTR1_forward_part_AmtR_forward_part_t16_forward_; ku__one_step_cooperative_binding*ordered_polymer_complex_complex_protein_AraC_input_2x_protein_Ara_input_2x__4x_part_P_BAD_forward__part_UTR1_forward_part_AmtR_forward_part_t16_forward_;
  r47: ordered_polymer_complex_complex_protein_AraC_input_2x_protein_Ara_input_2x__4x_part_P_BAD_forward__part_UTR1_forward_part_AmtR_forward_part_t16_forward_ => ordered_polymer_complex_complex_protein_AraC_input_2x_protein_Ara_input_2x__4x_part_P_BAD_forward__part_UTR1_forward_part_AmtR_forward_part_t16_forward_ + rna_part_UTR1_forward_part_AmtR_forward_part_t16_forward_; ktx_P_BAD_protein_AraC_input_2x_protein_Ara_input_2x_simple_transcription*ordered_polymer_complex_complex_protein_AraC_input_2x_protein_Ara_input_2x__4x_part_P_BAD_forward__part_UTR1_forward_part_AmtR_forward_part_t16_forward_;
  r48: ordered_polymer_complex_part_P_PhlF_protein_PhlF_degtagged_3x_forward__part_P_AmtR_forward_part_UTR1_forward_part_YFP_forward_part_t16_forward_ => ordered_polymer_complex_part_P_PhlF_protein_PhlF_degtagged_3x_forward__part_P_AmtR_forward_part_UTR1_forward_part_YFP_forward_part_t16_forward_ + rna_part_UTR1_forward_part_YFP_forward_part_t16_forward_; ktx_P_AmtR_leak_simple_transcription*ordered_polymer_complex_part_P_PhlF_protein_PhlF_degtagged_3x_forward__part_P_AmtR_forward_part_UTR1_forward_part_YFP_forward_part_t16_forward_;
  r49: protein_AmtR_degtagged + ordered_polymer_complex_part_P_PhlF_protein_PhlF_degtagged_3x_forward__part_P_AmtR_forward_part_UTR1_forward_part_YFP_forward_part_t16_forward_ => ordered_polymer_complex_part_P_PhlF_protein_PhlF_degtagged_3x_forward__complex_part_P_AmtR_protein_AmtR_degtagged_forward__part_UTR1_forward_part_YFP_forward_part_t16_forward_; kb_P_AmtR_AmtR_degtagged_one_step_cooperative_binding*protein_AmtR_degtagged*ordered_polymer_complex_part_P_PhlF_protein_PhlF_degtagged_3x_forward__part_P_AmtR_forward_part_UTR1_forward_part_YFP_forward_part_t16_forward_;
  r49rev: ordered_polymer_complex_part_P_PhlF_protein_PhlF_degtagged_3x_forward__complex_part_P_AmtR_protein_AmtR_degtagged_forward__part_UTR1_forward_part_YFP_forward_part_t16_forward_ => protein_AmtR_degtagged + ordered_polymer_complex_part_P_PhlF_protein_PhlF_degtagged_3x_forward__part_P_AmtR_forward_part_UTR1_forward_part_YFP_forward_part_t16_forward_; ku_P_AmtR_AmtR_degtagged_one_step_cooperative_binding*ordered_polymer_complex_part_P_PhlF_protein_PhlF_degtagged_3x_forward__complex_part_P_AmtR_protein_AmtR_degtagged_forward__part_UTR1_forward_part_YFP_forward_part_t16_forward_;
  r50: ordered_polymer_complex_part_P_PhlF_protein_PhlF_degtagged_3x_forward__complex_part_P_AmtR_protein_AmtR_degtagged_forward__part_UTR1_forward_part_YFP_forward_part_t16_forward_ => ordered_polymer_complex_part_P_PhlF_protein_PhlF_degtagged_3x_forward__complex_part_P_AmtR_protein_AmtR_degtagged_forward__part_UTR1_forward_part_YFP_forward_part_t16_forward_ + rna_part_UTR1_forward_part_YFP_forward_part_t16_forward_; ktx_P_AmtR_AmtR_degtagged_simple_transcription*ordered_polymer_complex_part_P_PhlF_protein_PhlF_degtagged_3x_forward__complex_part_P_AmtR_protein_AmtR_degtagged_forward__part_UTR1_forward_part_YFP_forward_part_t16_forward_;
  r51: ordered_polymer_part_P_PhlF_forward_complex_part_P_AmtR_protein_AmtR_degtagged_forward__part_UTR1_forward_part_YFP_forward_part_t16_forward_ => ordered_polymer_part_P_PhlF_forward_complex_part_P_AmtR_protein_AmtR_degtagged_forward__part_UTR1_forward_part_YFP_forward_part_t16_forward_ + rna_part_P_AmtR_forward_part_UTR1_forward_part_YFP_forward_part_t16_forward_; ktx_P_PhlF_leak_simple_transcription*ordered_polymer_part_P_PhlF_forward_complex_part_P_AmtR_protein_AmtR_degtagged_forward__part_UTR1_forward_part_YFP_forward_part_t16_forward_;
  r52: 3 protein_PhlF_degtagged + ordered_polymer_part_P_PhlF_forward_complex_part_P_AmtR_protein_AmtR_degtagged_forward__part_UTR1_forward_part_YFP_forward_part_t16_forward_ => ordered_polymer_complex_part_P_PhlF_protein_PhlF_degtagged_3x_forward__complex_part_P_AmtR_protein_AmtR_degtagged_forward__part_UTR1_forward_part_YFP_forward_part_t16_forward_; kb_P_PhlF_PhlF_degtagged_one_step_cooperative_binding*protein_PhlF_degtagged^3*ordered_polymer_part_P_PhlF_forward_complex_part_P_AmtR_protein_AmtR_degtagged_forward__part_UTR1_forward_part_YFP_forward_part_t16_forward_;
  r52rev: ordered_polymer_complex_part_P_PhlF_protein_PhlF_degtagged_3x_forward__complex_part_P_AmtR_protein_AmtR_degtagged_forward__part_UTR1_forward_part_YFP_forward_part_t16_forward_ => 3 protein_PhlF_degtagged + ordered_polymer_part_P_PhlF_forward_complex_part_P_AmtR_protein_AmtR_degtagged_forward__part_UTR1_forward_part_YFP_forward_part_t16_forward_; ku_P_PhlF_PhlF_degtagged_one_step_cooperative_binding*ordered_polymer_complex_part_P_PhlF_protein_PhlF_degtagged_3x_forward__complex_part_P_AmtR_protein_AmtR_degtagged_forward__part_UTR1_forward_part_YFP_forward_part_t16_forward_;
  r53: ordered_polymer_complex_part_P_PhlF_protein_PhlF_degtagged_3x_forward__complex_part_P_AmtR_protein_AmtR_degtagged_forward__part_UTR1_forward_part_YFP_forward_part_t16_forward_ => ordered_polymer_complex_part_P_PhlF_protein_PhlF_degtagged_3x_forward__complex_part_P_AmtR_protein_AmtR_degtagged_forward__part_UTR1_forward_part_YFP_forward_part_t16_forward_ + rna_part_P_AmtR_forward_part_UTR1_forward_part_YFP_forward_part_t16_forward_; ktx_P_PhlF_PhlF_degtagged_simple_transcription*ordered_polymer_complex_part_P_PhlF_protein_PhlF_degtagged_3x_forward__complex_part_P_AmtR_protein_AmtR_degtagged_forward__part_UTR1_forward_part_YFP_forward_part_t16_forward_;
  r54: dna_part_P_PhlF_forward_part_P_AmtR_forward_part_UTR1_forward_part_YFP_forward_part_t16_forward_ => dna_part_P_PhlF_forward_part_P_AmtR_forward_part_UTR1_forward_part_YFP_forward_part_t16_forward_ + rna_part_P_AmtR_forward_part_UTR1_forward_part_YFP_forward_part_t16_forward_; ktx_P_PhlF_leak_simple_transcription*dna_part_P_PhlF_forward_part_P_AmtR_forward_part_UTR1_forward_part_YFP_forward_part_t16_forward_;
  r55: 3 protein_PhlF_degtagged + dna_part_P_PhlF_forward_part_P_AmtR_forward_part_UTR1_forward_part_YFP_forward_part_t16_forward_ => ordered_polymer_complex_part_P_PhlF_protein_PhlF_degtagged_3x_forward__part_P_AmtR_forward_part_UTR1_forward_part_YFP_forward_part_t16_forward_; kb_P_PhlF_PhlF_degtagged_one_step_cooperative_binding*protein_PhlF_degtagged^3*dna_part_P_PhlF_forward_part_P_AmtR_forward_part_UTR1_forward_part_YFP_forward_part_t16_forward_;
  r55rev: ordered_polymer_complex_part_P_PhlF_protein_PhlF_degtagged_3x_forward__part_P_AmtR_forward_part_UTR1_forward_part_YFP_forward_part_t16_forward_ => 3 protein_PhlF_degtagged + dna_part_P_PhlF_forward_part_P_AmtR_forward_part_UTR1_forward_part_YFP_forward_part_t16_forward_; ku_P_PhlF_PhlF_degtagged_one_step_cooperative_binding*ordered_polymer_complex_part_P_PhlF_protein_PhlF_degtagged_3x_forward__part_P_AmtR_forward_part_UTR1_forward_part_YFP_forward_part_t16_forward_;
  r56: ordered_polymer_complex_part_P_PhlF_protein_PhlF_degtagged_3x_forward__part_P_AmtR_forward_part_UTR1_forward_part_YFP_forward_part_t16_forward_ => ordered_polymer_complex_part_P_PhlF_protein_PhlF_degtagged_3x_forward__part_P_AmtR_forward_part_UTR1_forward_part_YFP_forward_part_t16_forward_ + rna_part_P_AmtR_forward_part_UTR1_forward_part_YFP_forward_part_t16_forward_; ktx_P_PhlF_PhlF_degtagged_simple_transcription*ordered_polymer_complex_part_P_PhlF_protein_PhlF_degtagged_3x_forward__part_P_AmtR_forward_part_UTR1_forward_part_YFP_forward_part_t16_forward_;
  r57: dna_part_P_PhlF_forward_part_P_AmtR_forward_part_UTR1_forward_part_YFP_forward_part_t16_forward_ => dna_part_P_PhlF_forward_part_P_AmtR_forward_part_UTR1_forward_part_YFP_forward_part_t16_forward_ + rna_part_UTR1_forward_part_YFP_forward_part_t16_forward_; ktx_P_AmtR_leak_simple_transcription*dna_part_P_PhlF_forward_part_P_AmtR_forward_part_UTR1_forward_part_YFP_forward_part_t16_forward_;
  r58: protein_AmtR_degtagged + dna_part_P_PhlF_forward_part_P_AmtR_forward_part_UTR1_forward_part_YFP_forward_part_t16_forward_ => ordered_polymer_part_P_PhlF_forward_complex_part_P_AmtR_protein_AmtR_degtagged_forward__part_UTR1_forward_part_YFP_forward_part_t16_forward_; kb_P_AmtR_AmtR_degtagged_one_step_cooperative_binding*protein_AmtR_degtagged*dna_part_P_PhlF_forward_part_P_AmtR_forward_part_UTR1_forward_part_YFP_forward_part_t16_forward_;
  r58rev: ordered_polymer_part_P_PhlF_forward_complex_part_P_AmtR_protein_AmtR_degtagged_forward__part_UTR1_forward_part_YFP_forward_part_t16_forward_ => protein_AmtR_degtagged + dna_part_P_PhlF_forward_part_P_AmtR_forward_part_UTR1_forward_part_YFP_forward_part_t16_forward_; ku_P_AmtR_AmtR_degtagged_one_step_cooperative_binding*ordered_polymer_part_P_PhlF_forward_complex_part_P_AmtR_protein_AmtR_degtagged_forward__part_UTR1_forward_part_YFP_forward_part_t16_forward_;
  r59: ordered_polymer_part_P_PhlF_forward_complex_part_P_AmtR_protein_AmtR_degtagged_forward__part_UTR1_forward_part_YFP_forward_part_t16_forward_ => ordered_polymer_part_P_PhlF_forward_complex_part_P_AmtR_protein_AmtR_degtagged_forward__part_UTR1_forward_part_YFP_forward_part_t16_forward_ + rna_part_UTR1_forward_part_YFP_forward_part_t16_forward_; ktx_P_AmtR_AmtR_degtagged_simple_transcription*ordered_polymer_part_P_PhlF_forward_complex_part_P_AmtR_protein_AmtR_degtagged_forward__part_UTR1_forward_part_YFP_forward_part_t16_forward_;
  r60: rna_part_P_BetI_forward_part_UTR1_forward_part_PhlF_forward_part_t16_forward_ => rna_part_P_BetI_forward_part_UTR1_forward_part_PhlF_forward_part_t16_forward_ + protein_PhlF_degtagged; ktl__*rna_part_P_BetI_forward_part_UTR1_forward_part_PhlF_forward_part_t16_forward_;
  r61: rna_part_UTR1_forward_part_PhlF_forward_part_t16_forward_ => rna_part_UTR1_forward_part_PhlF_forward_part_t16_forward_ + protein_PhlF_degtagged; ktl__*rna_part_UTR1_forward_part_PhlF_forward_part_t16_forward_;
  r62: rna_part_P_Tet_forward_part_UTR1_forward_part_SrpR_forward_part_t16_forward_ => rna_part_P_Tet_forward_part_UTR1_forward_part_SrpR_forward_part_t16_forward_ + protein_SrpR_degtagged; ktl__*rna_part_P_Tet_forward_part_UTR1_forward_part_SrpR_forward_part_t16_forward_;
  r63: rna_part_UTR1_forward_part_SrpR_forward_part_t16_forward_ => rna_part_UTR1_forward_part_SrpR_forward_part_t16_forward_ + protein_SrpR_degtagged; ktl__*rna_part_UTR1_forward_part_SrpR_forward_part_t16_forward_;
  r64: rna_part_P_AmeR_forward_part_UTR1_forward_part_BetI_forward_part_t16_forward_ => rna_part_P_AmeR_forward_part_UTR1_forward_part_BetI_forward_part_t16_forward_ + protein_BetI_degtagged; ktl__*rna_part_P_AmeR_forward_part_UTR1_forward_part_BetI_forward_part_t16_forward_;
  r65: rna_part_UTR1_forward_part_BetI_forward_part_t16_forward_ => rna_part_UTR1_forward_part_BetI_forward_part_t16_forward_ + protein_BetI_degtagged; ktl__*rna_part_UTR1_forward_part_BetI_forward_part_t16_forward_;
  r66: rna_part_UTR1_forward_part_AmeR_forward_part_t16_forward_ => rna_part_UTR1_forward_part_AmeR_forward_part_t16_forward_ + protein_AmeR_degtagged; ktl__*rna_part_UTR1_forward_part_AmeR_forward_part_t16_forward_;
  r67: rna_part_UTR1_forward_part_HlyIIR_forward_part_t16_forward_ => rna_part_UTR1_forward_part_HlyIIR_forward_part_t16_forward_ + protein_HlyIIR_degtagged; ktl__*rna_part_UTR1_forward_part_HlyIIR_forward_part_t16_forward_;
  r68: rna_part_UTR1_forward_part_AmtR_forward_part_t16_forward_ => rna_part_UTR1_forward_part_AmtR_forward_part_t16_forward_ + protein_AmtR_degtagged; ktl__*rna_part_UTR1_forward_part_AmtR_forward_part_t16_forward_;
  r69: rna_part_P_AmtR_forward_part_UTR1_forward_part_YFP_forward_part_t16_forward_ => rna_part_P_AmtR_forward_part_UTR1_forward_part_YFP_forward_part_t16_forward_ + protein_YFP_degtagged; ktl__*rna_part_P_AmtR_forward_part_UTR1_forward_part_YFP_forward_part_t16_forward_;
  r70: rna_part_UTR1_forward_part_YFP_forward_part_t16_forward_ => rna_part_UTR1_forward_part_YFP_forward_part_t16_forward_ + protein_YFP_degtagged; ktl__*rna_part_UTR1_forward_part_YFP_forward_part_t16_forward_;
  r71: protein_PhlF_degtagged => ; kdil__*protein_PhlF_degtagged;
  r72: protein_SrpR_degtagged => ; kdil__*protein_SrpR_degtagged;
  r73: protein_BetI_degtagged => ; kdil__*protein_BetI_degtagged;
  r74: protein_AmeR_degtagged => ; kdil__*protein_AmeR_degtagged;
  r75: protein_HlyIIR_degtagged => ; kdil__*protein_HlyIIR_degtagged;
  r76: protein_AmtR_degtagged => ; kdil__*protein_AmtR_degtagged;
  r77: protein_YFP_degtagged => ; kdil__*protein_YFP_degtagged;
  r78: rna_part_UTR1_forward_part_PhlF_forward_part_t16_forward_ => ; kdil__*rna_part_UTR1_forward_part_PhlF_forward_part_t16_forward_;
  r79: rna_part_P_BetI_forward_part_UTR1_forward_part_PhlF_forward_part_t16_forward_ => ; kdil__*rna_part_P_BetI_forward_part_UTR1_forward_part_PhlF_forward_part_t16_forward_;
  r80: rna_part_UTR1_forward_part_SrpR_forward_part_t16_forward_ => ; kdil__*rna_part_UTR1_forward_part_SrpR_forward_part_t16_forward_;
  r81: rna_part_P_Tet_forward_part_UTR1_forward_part_SrpR_forward_part_t16_forward_ => ; kdil__*rna_part_P_Tet_forward_part_UTR1_forward_part_SrpR_forward_part_t16_forward_;
  r82: rna_part_UTR1_forward_part_BetI_forward_part_t16_forward_ => ; kdil__*rna_part_UTR1_forward_part_BetI_forward_part_t16_forward_;
  r83: rna_part_P_AmeR_forward_part_UTR1_forward_part_BetI_forward_part_t16_forward_ => ; kdil__*rna_part_P_AmeR_forward_part_UTR1_forward_part_BetI_forward_part_t16_forward_;
  r84: rna_part_UTR1_forward_part_AmeR_forward_part_t16_forward_ => ; kdil__*rna_part_UTR1_forward_part_AmeR_forward_part_t16_forward_;
  r85: rna_part_UTR1_forward_part_HlyIIR_forward_part_t16_forward_ => ; kdil__*rna_part_UTR1_forward_part_HlyIIR_forward_part_t16_forward_;
  r86: rna_part_UTR1_forward_part_AmtR_forward_part_t16_forward_ => ; kdil__*rna_part_UTR1_forward_part_AmtR_forward_part_t16_forward_;
  r87: rna_part_UTR1_forward_part_YFP_forward_part_t16_forward_ => ; kdil__*rna_part_UTR1_forward_part_YFP_forward_part_t16_forward_;
  r88: rna_part_P_AmtR_forward_part_UTR1_forward_part_YFP_forward_part_t16_forward_ => ; kdil__*rna_part_P_AmtR_forward_part_UTR1_forward_part_YFP_forward_part_t16_forward_;

  // Unit definitions:
  unit square_metre = metre^2;
end
