// SBML level 3 version 2

model biocrnpyler_888679()
  // model units - substance: mole, time: second, volume: litre, area: square_metre, length: metre, extent: mole

  // Compartments:
  compartment default = 1e-6;

  // Species:
  species dna_SrpR_assembly1 in default = 0;
  species LacI_repressor in default = 0;
  species rna_SrpR_assembly1 in default = 0;
  species SrpR_degtagged in default = 0;
  species dna_SrpR_assembly2 in default = 0;
  species TetR_repressor in default = 0;
  species rna_SrpR_assembly2 in default = 0;
  species IPTG_input in default = 0;
  species complex_IPTG_input_2x_LacI_repressor_2x_ in default = 0;
  species aTc_input in default = 0;
  species complex_TetR_repressor_2x_aTc_input_2x_ in default = 0;
  species protease in default = 0;
  species complex_SrpR_degtagged_protease_ in default = 0;

  // Parameters:
  k__negativehill_transcription = 0.01875;
  K__negativehill_transcription = 20;
  n__negativehill_transcription = 2;
  ktl_medium_simple_translation = 0.075;
  kb__ = 100;
  ku__ = 10;
  kdil__rna_degredation = 0.001;
  kdeg__deg_tagged_degredation = 0.0075;

  // Reactions:
  r0: dna_SrpR_assembly1 => dna_SrpR_assembly1 + rna_SrpR_assembly1; k__negativehill_transcription*dna_SrpR_assembly1/(1 + (LacI_repressor/K__negativehill_transcription)^n__negativehill_transcription);  // modifiers: LacI_repressor
  r1: rna_SrpR_assembly1 => rna_SrpR_assembly1 + SrpR_degtagged; ktl_medium_simple_translation*rna_SrpR_assembly1;
  r2: dna_SrpR_assembly2 => dna_SrpR_assembly2 + rna_SrpR_assembly2; k__negativehill_transcription*dna_SrpR_assembly2/(1 + (TetR_repressor/K__negativehill_transcription)^n__negativehill_transcription);  // modifiers: TetR_repressor
  r3: rna_SrpR_assembly2 => rna_SrpR_assembly2 + SrpR_degtagged; ktl_medium_simple_translation*rna_SrpR_assembly2;
  r4: 2 IPTG_input + 2 LacI_repressor => complex_IPTG_input_2x_LacI_repressor_2x_; kb__*IPTG_input^2*LacI_repressor^2;
  r4rev: complex_IPTG_input_2x_LacI_repressor_2x_ => 2 IPTG_input + 2 LacI_repressor; ku__*complex_IPTG_input_2x_LacI_repressor_2x_;
  r5: 2 aTc_input + 2 TetR_repressor => complex_TetR_repressor_2x_aTc_input_2x_; kb__*aTc_input^2*TetR_repressor^2;
  r5rev: complex_TetR_repressor_2x_aTc_input_2x_ => 2 aTc_input + 2 TetR_repressor; ku__*complex_TetR_repressor_2x_aTc_input_2x_;
  r6: rna_SrpR_assembly1 => ; kdil__rna_degredation*rna_SrpR_assembly1;
  r7: rna_SrpR_assembly2 => ; kdil__rna_degredation*rna_SrpR_assembly2;
  r8: SrpR_degtagged + protease => complex_SrpR_degtagged_protease_; kb__*SrpR_degtagged*protease;
  r8rev: complex_SrpR_degtagged_protease_ => SrpR_degtagged + protease; ku__*complex_SrpR_degtagged_protease_;
  r9: complex_SrpR_degtagged_protease_ => protease; kdeg__deg_tagged_degredation*complex_SrpR_degtagged_protease_;

  // Unit definitions:
  unit square_metre = metre^2;
end
